1/(s*C)*(r + s*L)/(r + s*L + 1/(s*C)) == (r + s*L)/(1 + s*r*C + s^2*L*C)
f_mag(ω) := sqrt((r^2 + (ω*L)^2)/((1 - ω^2*L*C)^2 + (ω*r*C)^2))  # error: Эта переменная не определена.
grad(ω) := [d/dL(f_mag(ω)); d/dr(f_mag(ω)); d/dC(f_mag(ω))]  # error: Эта переменная не определена.
grad(ω) simplify → [
    ω^2*(L - C*L^2*ω^2 + C*r^2)/(sqrt((L^2*ω^2 + r^2)/(C^2*L^2*ω^4 + C^2*ω^2*r^2 - 2*C*L*ω^2 + 1))*(C^2*L^2*ω^4 + C^2*ω^2*r^2 - 2*C*L*ω^2 + 1)^2);
    -r*(2*C*L*ω^2 - 1)/(sqrt((L^2*ω^2 + r^2)/(C^2*L^2*ω^4 + C^2*ω^2*r^2 - 2*C*L*ω^2 + 1))*(C^2*L^2*ω^4 + C^2*ω^2*r^2 - 2*C*L*ω^2 + 1)^2);
    -ω^2*(L^2*ω^2 + r^2)*(C*L^2*ω^2 - L + C*r^2)/(sqrt((L^2*ω^2 + r^2)/(C^2*L^2*ω^4 + C^2*ω^2*r^2 - 2*C*L*ω^2 + 1))*(C^2*L^2*ω^4 + C^2*ω^2*r^2 - 2*C*L*ω^2 + 1)^2)
]
grad_1(ω) := 1/sqrt((r^2 + (ω*L)^2)/((1 - ω^2*L*C)^2 + (ω*r*C)^2))*1/((1 - ω^2*L*C)^2 + (ω*r*C)^2)^2*[ω^2*L*(1 - C*L*ω^2 + C/L*r^2); r*(1 - 2*C*L*ω^2); ω^2*L*(r^2 + (ω*L)^2)*(1 - C*L*ω^2 - C/L*r^2)]  # error: Эта переменная не определена.
grad(ω)[0]/grad_1(ω)[0] simplify → 1
grad(ω)[1]/grad_1(ω)[1] simplify → 1
grad(ω)[2]/grad_1(ω)[2] simplify → 1
